n := 40
a := -1
b := 3
h := (b - a)/n
x := a, a + h .. b
y(x) := x^2*e^(-|x|)
x = [
    -1; -0.9; -0.8; -0.7; -0.6; -0.5; -0.4; -0.3; -0.2; -0.1
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]
y(x) = [
    0.367879; 0.329321; 0.287571; 0.243327; 0.197572; 0.151633; 0.107251; 0.0666736; 0.0327492; 0.00904837
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]
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