i := 1, 2 .. 5
j := 1, 2 .. 5
f(i, j) := asin((i + j + 2)/(2*(i + 1) + 3*(j + 1)))
A := matrix(5, 5, f) = [
    0.411517, 0.384397, 0.372169, 0.365207, 0.360713;
    0.442911, 0.411517, 0.394791, 0.384397, 0.37731;
    0.460554, 0.429775, 0.411517, 0.399425, 0.390826;
    0.471862, 0.442911, 0.42439, 0.411517, 0.402049;
    0.479729, 0.452817, 0.434606, 0.421458, 0.411517
]
B := A^-1 = [
    -1501.94, 13112.5, -35103.4, 38158.6, -14648.3;
    6007.72, -76624.7, 233603, -273396, 110238;
    -6670.08, 159179, -547063, 680774, -285654;
    -976.967, -131951, 520504, -687291, 298983;
    3185.13, 36057.9, -171446, 241274, -108747
]
C := transpose(A) = [
    0.411517, 0.442911, 0.460554, 0.471862, 0.479729;
    0.384397, 0.411517, 0.429775, 0.442911, 0.452817;
    0.372169, 0.394791, 0.411517, 0.42439, 0.434606;
    0.365207, 0.384397, 0.399425, 0.411517, 0.421458;
    0.360713, 0.37731, 0.390826, 0.402049, 0.411517
]
b(i) := product(2*k + 3, k = 1 .. i)
b(i) = [5; 35; 315; 3465; 45045]
A*b(i) = [
    [
        2.05758, 1.92198, 1.86084, 1.82604, 1.80356;
        2.21456, 2.05758, 1.97396, 1.92198, 1.88655;
        2.30277, 2.14888, 2.05758, 1.99713, 1.95413;
        2.35931, 2.21456, 2.12195, 2.05758, 2.01024;
        2.39864, 2.26408, 2.17303, 2.10729, 2.05758
    ];
    [
        14.4031, 13.4539, 13.0259, 12.7823, 12.6249;
        15.5019, 14.4031, 13.8177, 13.4539, 13.2059;
        16.1194, 15.0421, 14.4031, 13.9799, 13.6789;
        16.5152, 15.5019, 14.8536, 14.4031, 14.0717;
        16.7905, 15.8486, 15.2112, 14.751, 14.4031
    ];
    [
        129.628, 121.085, 117.233, 115.04, 113.625;
        139.517, 129.628, 124.359, 121.085, 118.853;
        145.075, 135.379, 129.628, 125.819, 123.11;
        148.636, 139.517, 133.683, 129.628, 126.645;
        151.115, 142.637, 136.901, 132.759, 129.628
    ];
    [
        1425.91, 1331.93, 1289.56, 1265.44, 1249.87;
        1534.69, 1425.91, 1367.95, 1331.93, 1307.38;
        1595.82, 1489.17, 1425.91, 1384.01, 1354.21;
        1635, 1534.69, 1470.51, 1425.91, 1393.1;
        1662.26, 1569.01, 1505.91, 1460.35, 1425.91
    ];
    [
        18536.8, 17315.2, 16764.3, 16450.8, 16248.3;
        19950.9, 18536.8, 17783.4, 17315.2, 16995.9;
        20745.7, 19359.2, 18536.8, 17992.1, 17604.8;
        21255, 19950.9, 19116.6, 18536.8, 18110.3;
        21609.4, 20397.1, 19576.8, 18984.6, 18536.8
    ]
]
