i := 1, 2 .. 5
j := 1, 2 .. 5
f(i, j) := asin((i + 1) + (j + 2))
A := matrix(5, 5, f) = [
    1.5708 - 1.76275i, 1.5708 - 2.06344i, 1.5708 - 2.29243i, 1.5708 - 2.47789i, 1.5708 - 2.63392i;
    1.5708 - 2.06344i, 1.5708 - 2.29243i, 1.5708 - 2.47789i, 1.5708 - 2.63392i, 1.5708 - 2.76866i;
    1.5708 - 2.29243i, 1.5708 - 2.47789i, 1.5708 - 2.63392i, 1.5708 - 2.76866i, 1.5708 - 2.88727i;
    1.5708 - 2.47789i, 1.5708 - 2.63392i, 1.5708 - 2.76866i, 1.5708 - 2.88727i, 1.5708 - 2.99322i;
    1.5708 - 2.63392i, 1.5708 - 2.76866i, 1.5708 - 2.88727i, 1.5708 - 2.99322i, 1.5708 - 3.08897i
]
max(A) = 1.5708 - 1.76275i
B := A^-1 = [
    12.4559 - 1973.88i, -121.251 + 13826.4i, 371.263 - 33056.1i, -450.49 + 32862.6i, 188.92 - 11656.4i;
    -121.251 + 13826.4i, 1180.3 - 103426i, -3614.01 + 257477i, 4385.24 - 263089i, -1839.02 + 95186.4i;
    371.263 - 33056.1i, -3614.01 + 257477i, 11065.9 - 657973i, -13427.4 + 684825i, 5630.97 - 251193i;
    -450.49 + 32862.6i, 4385.24 - 263089i, -13427.4 + 684825i, 16292.8 - 722338i, -6832.62 + 267643i;
    188.92 - 11656.4i, -1839.02 + 95186.4i, 5630.97 - 251193i, -6832.62 + 267643i, 2865.36 - 99938.7i
]
C := transpose(A) = [
    1.5708 - 1.76275i, 1.5708 - 2.06344i, 1.5708 - 2.29243i, 1.5708 - 2.47789i, 1.5708 - 2.63392i;
    1.5708 - 2.06344i, 1.5708 - 2.29243i, 1.5708 - 2.47789i, 1.5708 - 2.63392i, 1.5708 - 2.76866i;
    1.5708 - 2.29243i, 1.5708 - 2.47789i, 1.5708 - 2.63392i, 1.5708 - 2.76866i, 1.5708 - 2.88727i;
    1.5708 - 2.47789i, 1.5708 - 2.63392i, 1.5708 - 2.76866i, 1.5708 - 2.88727i, 1.5708 - 2.99322i;
    1.5708 - 2.63392i, 1.5708 - 2.76866i, 1.5708 - 2.88727i, 1.5708 - 2.99322i, 1.5708 - 3.08897i
]
det(A) =  # error: This variable is undefined.
b(i) := product(1/(i! + 1), k = 1 .. i)
b(i) = [0.5; 0.111111; 0.00291545; 2.56e-6; 3.85543e-11]
A*b(i) = [
    [
        0.785398 - 0.881374i, 0.785398 - 1.03172i, 0.785398 - 1.14622i, 0.785398 - 1.23894i, 0.785398 - 1.31696i;
        0.785398 - 1.03172i, 0.785398 - 1.14622i, 0.785398 - 1.23894i, 0.785398 - 1.31696i, 0.785398 - 1.38433i;
        0.785398 - 1.14622i, 0.785398 - 1.23894i, 0.785398 - 1.31696i, 0.785398 - 1.38433i, 0.785398 - 1.44364i;
        0.785398 - 1.23894i, 0.785398 - 1.31696i, 0.785398 - 1.38433i, 0.785398 - 1.44364i, 0.785398 - 1.49661i;
        0.785398 - 1.31696i, 0.785398 - 1.38433i, 0.785398 - 1.44364i, 0.785398 - 1.49661i, 0.785398 - 1.54448i
    ];
    [
        0.174533 - 0.195861i, 0.174533 - 0.229271i, 0.174533 - 0.254715i, 0.174533 - 0.275321i, 0.174533 - 0.292657i;
        0.174533 - 0.229271i, 0.174533 - 0.254715i, 0.174533 - 0.275321i, 0.174533 - 0.292657i, 0.174533 - 0.307629i;
        0.174533 - 0.254715i, 0.174533 - 0.275321i, 0.174533 - 0.292657i, 0.174533 - 0.307629i, 0.174533 - 0.320808i;
        0.174533 - 0.275321i, 0.174533 - 0.292657i, 0.174533 - 0.307629i, 0.174533 - 0.320808i, 0.174533 - 0.33258i;
        0.174533 - 0.292657i, 0.174533 - 0.307629i, 0.174533 - 0.320808i, 0.174533 - 0.33258i, 0.174533 - 0.343219i
    ];
    [
        0.00457958 - 0.0051392i, 0.00457958 - 0.00601585i, 0.00457958 - 0.00668347i, 0.00457958 - 0.00722417i, 0.00457958 - 0.00767905i;
        0.00457958 - 0.00601585i, 0.00457958 - 0.00668347i, 0.00457958 - 0.00722417i, 0.00457958 - 0.00767905i, 0.00457958 - 0.00807189i;
        0.00457958 - 0.00668347i, 0.00457958 - 0.00722417i, 0.00457958 - 0.00767905i, 0.00457958 - 0.00807189i, 0.00457958 - 0.0084177i;
        0.00457958 - 0.00722417i, 0.00457958 - 0.00767905i, 0.00457958 - 0.00807189i, 0.00457958 - 0.0084177i, 0.00457958 - 0.0087266i;
        0.00457958 - 0.00767905i, 0.00457958 - 0.00807189i, 0.00457958 - 0.0084177i, 0.00457958 - 0.0087266i, 0.00457958 - 0.00900574i
    ];
    [
        4.02124e-6 - 4.51263e-6i, 4.02124e-6 - 5.2824e-6i, 4.02124e-6 - 5.86863e-6i, 4.02124e-6 - 6.3434e-6i, 4.02124e-6 - 6.74282e-6i;
        4.02124e-6 - 5.2824e-6i, 4.02124e-6 - 5.86863e-6i, 4.02124e-6 - 6.3434e-6i, 4.02124e-6 - 6.74282e-6i, 4.02124e-6 - 7.08777e-6i;
        4.02124e-6 - 5.86863e-6i, 4.02124e-6 - 6.3434e-6i, 4.02124e-6 - 6.74282e-6i, 4.02124e-6 - 7.08777e-6i, 4.02124e-6 - 7.39141e-6i;
        4.02124e-6 - 6.3434e-6i, 4.02124e-6 - 6.74282e-6i, 4.02124e-6 - 7.08777e-6i, 4.02124e-6 - 7.39141e-6i, 4.02124e-6 - 7.66265e-6i;
        4.02124e-6 - 6.74282e-6i, 4.02124e-6 - 7.08777e-6i, 4.02124e-6 - 7.39141e-6i, 4.02124e-6 - 7.66265e-6i, 4.02124e-6 - 7.90776e-6i
    ];
    [
        6.0561e-11 - 6.79615e-11i, 6.0561e-11 - 7.95544e-11i, 6.0561e-11 - 8.83832e-11i, 6.0561e-11 - 9.55333e-11i, 6.0561e-11 - 1.01549e-10i;
        6.0561e-11 - 7.95544e-11i, 6.0561e-11 - 8.83832e-11i, 6.0561e-11 - 9.55333e-11i, 6.0561e-11 - 1.01549e-10i, 6.0561e-11 - 1.06744e-10i;
        6.0561e-11 - 8.83832e-11i, 6.0561e-11 - 9.55333e-11i, 6.0561e-11 - 1.01549e-10i, 6.0561e-11 - 1.06744e-10i, 6.0561e-11 - 1.11317e-10i;
        6.0561e-11 - 9.55333e-11i, 6.0561e-11 - 1.01549e-10i, 6.0561e-11 - 1.06744e-10i, 6.0561e-11 - 1.11317e-10i, 6.0561e-11 - 1.15402e-10i;
        6.0561e-11 - 1.01549e-10i, 6.0561e-11 - 1.06744e-10i, 6.0561e-11 - 1.11317e-10i, 6.0561e-11 - 1.15402e-10i, 6.0561e-11 - 1.19093e-10i
    ]
]
