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# Метод Крамера
A := [3, 4, 1; 2, 1, 3; 1, -2, 1]
A1 := [-2, 4, 1; 5, 1, 3; 4, -2, 1]
A2 := [3, -2, 1; 2, 5, 3; 1, 4, 1]
A3 := [3, 4, -2; 2, 1, 5; 1, -2, 4]
b := [-2; 5; 4]
# Метод оберненої матриці
A^-1 = [0.35, -0.3, 0.55; 0.05, 0.1, -0.35; -0.25, 0.5, -0.25]
detA := |A|
detA = 20
A^-1*b = [0; -1; 2]
detA1 := |A1|
detA1 = 4.88498e-15
detA2 := |A2|
detA2 = -20
detA3 := |A3|
detA3 = 40
x1 := detA1/detA
x1 = 2.44249e-16
x2 := detA2/detA
x2 = -1
x3 := detA3/detA
x3 = 2
