x := -2, -1.9 .. 2
y(x) :=
    sin(x) if x ≤ 0
    ((2*x)^2 + 3*x + 5) if 0 < x ≤ 1
    x^2 - sin(3.14*x)^2 - 1 if (x > 1)
x = [
    -2; -1.9; -1.8; -1.7; -1.6; -1.5; -1.4; -1.3; -1.2; -1.1
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]
y(x) = [
    -0.909297; -0.9463; -0.973848; -0.991665; -0.999574; -0.997495; -0.98545; -0.963558; -0.932039; -0.891207
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]
